OpenVSP model (file version 5), 2 components.
Geometry view with OpenVSP parameter names; values to 6 digits, angles in degrees, lengths in the model's unit.
Overall bounding box: X_Min=-3.68011 X_Len=26.4553 Y_Min=-31.2225 Y_Len=62.4451 Z_Min=-2.39766 Z_Len=4.10814

Wing "Wing"
  location (X Y Z) 0 0 0, rotation 0 0 0
  symmetric about XZ
  bounding box size 26.4553 62.4451 3.45278
  totals: TotalSpan=62.4451 TotalProjectedSpan=62.4451 TotalChord=14.212 TotalArea=752.286 TotalAR=5.18338
  root: chord 23.8125, twist 0, general fuselage BotStr=1.70523 BotTanAngle=33.5455 CornerRad=0 DeltaX=-0.154545 DeltaY=-0.0272727 Height=3.40909 LowStr=1.82168 MaxWidthLoc=-0.509091 TopStr=0.931636 TopTanAngle=36.8182 UpStr=1.14791 Width=23.8125
  sections:
    n  Span     Root_Chord  Tip_Chord  Area     Sweep  Sweep_Location  Dihedral  Twist  Twist_Location  tip airfoil
    1  5.82386  23.8125     17.1042    119.147  30     0               0         0      0.25            general fuselage BotStr=1.70523 BotTanAngle=33.5455 CornerRad=0 DeltaX=-0.109091 DeltaY=-0.0272727 Height=2.77727 LowStr=1.82168 MaxWidthLoc=-0.509091 TopStr=0.931636 TopTanAngle=36.8182 UpStr=1.14791 Width=17.1042
    2  5        17.1042     16.526     84.0755  30     0               0         0      0.25            NACA 4-series Camber=0 CamberLoc=0.2 DeltaY=-0.0272727 ThickChord=0.1
    3  5.52273  16.526      8.76302    69.8323  30     0               0         0      0.25            NACA 4-series Camber=0 CamberLoc=0.2 DeltaX=0.209091 DeltaY=-0.00909091 ThickChord=0.1
    4  14.8759  8.76302     5.09676    103.089  30     0               0         0      0.25            NACA 4-series Camber=0 CamberLoc=0.2 DeltaX=-0.163636 DeltaY=0.127273 ThickChord=0.1

Stack "Engine"
  location (X Y Z) 7 5.76087 0.652174, rotation 0 6.95652 0
  symmetric about XZ
  bounding box size 12.8455 14.498 3.58872
  cross sections:
    n  XDelta   YDelta  ZDelta  shape
    0  0        0       0       general fuselage BotStr=1.58877 BotTanAngle=118.636 CornerRad=0.313636 Height=2 LowStr=0.865091 MaxWidthLoc=0.436364 TopStr=1.19782 TopTanAngle=121.091 UpStr=0.490773 Width=2.5
    1  0.42623  0       0       as above
    2  2        0       0       as above
    3  2.47541  0       0       as above
    4  7.79508  0       0       general fuselage BotStr=1.58877 BotTanAngle=118.636 CornerRad=0.313636 Height=2 LowStr=0.865091 MaxWidthLoc=0.436364 TopStr=1.19782 TopTanAngle=121.091 UpStr=0.490773 Width=1.70455
